ORIGIN := 1
n := 200
x := [
    15.772, 5.995, 5.253, 8.859, 5.514, -5.204, 8.623, 0.511, 3.795, -1.048;
    -3.56, 3.671, 2.046, 7.653, 4.39, 8.769, 3.128, 5.984, 9.557, 2.128;
    2.098, 6.6, 7.831, 5.115, 4.191, 13.615, -3.044, -0.3, 3.098, 8.854;
    4.942, 10.613, 0.149, 4.171, 15.512, -2.512, 0.268, 3.353, -3.179, 8.105;
    8.039, 6.16, -1.472, 7.071, 2.745, 3.241, 5.098, 11.38, 9.345, 11.21;
    2.979, 4.245, 6.062, 1.114, -1.62, 5.028, -3.634, 5.369, 9.123, 3.452;
    0.23, 5.488, 7.898, 10.556, 1.757, 4.476, 9.584, 5.388, 2.3, 6.471;
    11.727, 0.77, 9.293, 7.585, 8.459, 0.263, 11.306, 1.674, 1.601, 7.834;
    11.739, 6.371, 4.221, 3.93, 7.917, 7.006, 4.985, -0.527, 1.374, 6.235;
    13.135, 13.3, -1.367, 4.133, 3.964, 2.929, -1.488, 5.975, 3.285, 10.691;
    -2.797, 6.387, -0.045, 6.009, -3.164, 13.116, -0.739, 8.674, 10.209, 7.218;
    6.164, 2.634, 6.175, 8.955, 6.488, 11.959, -1.533, 1.708, 9.067, 9.716;
    5.634, -3.142, 4.618, 4.264, -0.366, -2.836, 7.724, 3.194, 10.392, 2.565;
    -1.597, 2.256, -2.795, 5.377, 4.563, -3.105, 0.947, 3.577, 1.014, 4.951;
    3.721, 7.079, 3.687, 15.53, 3.603, 1.792, 10.064, 4.327, 2.754, 1.277;
    3.194, -3.095, 2.904, -3.302, 9.084, 6.295, 6.804, 4.767, 6.979, 7.576;
    5.529, 3.792, 1.551, -0.775, 3.242, -0.906, 4.986, 8.193, 6.601, 4.2;
    9.264, 3.245, -1.196, 5.127, 5.807, 10.586, 1.848, 10.374, 6.045, 6.341;
    8.442, 5.757, 6.83, 0.542, -2.185, 3.973, 1.355, -3.211, 7.868, 3.619;
    5.724, 8.327, 2.231, 3.287, 4.418, 4.711, 5.193, 4.531, 1.863, 8.025
]
max(x) = 15.772
min(x) = -5.204
ω := max(x) - min(x) = 20.976
l := trunc(1 + log(n)/log(2)) = 8
f := histogram(l, x) = [-3.893, 14; -1.271, 17; 1.351, 29; 3.973, 53; 6.595, 43; 9.217, 27; 11.839, 12; 14.461, 5]
h := ω/l = 2.622
p := f[:, 2]/n = [0.07; 0.085; 0.145; 0.265; 0.215; 0.135; 0.06; 0.025]
int := f[:, 1] = [-3.893; -1.271; 1.351; 3.973; 6.595; 9.217; 11.839; 14.461]
int1 := int - h/2
f1 := p/h = [0.0266972; 0.032418; 0.0553013; 0.101068; 0.0819985; 0.0514874; 0.0228833; 0.00953471]
int1[9] := max(x) = 15.772
int1 = [-5.204; -2.582; 0.04; 2.662; 5.284; 7.906; 10.528; 13.15; 15.772]
xm := 1/200*sum(sum(x[i, j], j = 1 .. 10), i = 1 .. 20) = 4.61174
s2 := 1/199*sum(sum((x[i, j] - xm)^2, j = 1 .. 10), i = 1 .. 20) = 18.1742
a := xm = 4.61174
σ := sqrt(s2) = 4.26312
k := 1 .. 8
pt[k] := pnorm(int1[k + 1], a, σ) - pnorm(int1[k], a, σ)
pt[1] := pnorm(int1[2], a, σ)
pt[8] := pnorm(1000, a, σ) - pnorm(int1[8], a, σ)
pt = [0.0457596; 0.0960117; 0.181938; 0.238941; 0.21751; 0.137237; 0.0600042; 0.0225983]
pt1 := pt*n = [9.15191; 19.2023; 36.3875; 47.7882; 43.5021; 27.4475; 12.0008; 4.51966]
sum(pt[k], k = 1 .. 8) = 1
sum(pt1[k], k = 1 .. 8) = 200
χ2 := sum((pt1[k] - f[k, 2])^2/pt1[k], k = 1 .. 6) + (pt1[7] + pt1[8] - f[7, 2] - f[8, 2])^2/(pt1[7] + pt1[8]) = 4.91606
m1 := l - 4 = 4
qchisq(0.98, 4) = 11.6678
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